# OpenSim document version 40500
ScaleTool scaled:
  mass: 64 [kg]
  height: 166
  age: -1
  ModelScaler:
    apply: true
    scaling_order: measurements
    marker_file: xiangmai.trc
    time_range: 0 4.015
    preserve_mass_distribution: true
    output_model_file: D:\Documents\MATLAB\OpenSim\Auto_scale\prepared_file\ModelScaled_API.osim
    MeasurementSet:
      Measurement pelvis: apply=true
        MarkerPair: markers=(L.ASIS V.Sacral)
        MarkerPair: markers=(R.ASIS V.Sacral)
        BodyScale pelvis: axes=(X Y Z)
      Measurement torso: apply=true
        MarkerPair: markers=(Top.Head Sternum)
        BodyScale torso: axes=(X Y Z)
      Measurement foot: apply=true
        MarkerPair: markers=(L.Heel L.Toe.Lat)
        MarkerPair: markers=(R.Heel R.Toe.Lat)
        BodyScale talus_r: axes=(X Y Z)
        BodyScale calcn_r: axes=(X Y Z)
        BodyScale toes_r: axes=(X Y Z)
        BodyScale talus_l: axes=(X Y Z)
        BodyScale calcn_l: axes=(X Y Z)
        BodyScale toes_l: axes=(X Y Z)
      Measurement thigh: apply=true
        MarkerPair: markers=(L.ASIS L.Knee.Lat)
        MarkerPair: markers=(R.ASIS R.Knee.Lat)
        BodyScale femur_r: axes=(X Y Z)
        BodyScale femur_l: axes=(X Y Z)
      Measurement shank: apply=true
        MarkerPair: markers=(R.Knee.Lat R.Ankle.Lat)
        MarkerPair: markers=(L.Knee.Lat L.Ankle.Lat)
        BodyScale tibia_r: axes=(X Y Z)
        BodyScale tibia_l: axes=(X Y Z)
  MarkerPlacer:
    apply: true
    marker_file: xiangmai.trc
    time_range: 0.99 3.965
    max_marker_movement: -1
    IKTaskSet:
      IKMarkerTask Sternum: apply=true weight=1
      IKMarkerTask R.Acromium: apply=true weight=1
      IKMarkerTask L.Acromium: apply=true weight=1
      IKMarkerTask Top.Head: apply=true weight=1
      IKMarkerTask R.ASIS: apply=true weight=1
      IKMarkerTask L.ASIS: apply=true weight=1
      IKMarkerTask V.Sacral: apply=true weight=1
      IKMarkerTask R.Knee.Lat: apply=true weight=1
      IKMarkerTask R.Knee.Med: apply=true weight=1
      IKMarkerTask R.Ankle.Lat: apply=true weight=1
      IKMarkerTask R.Ankle.Med: apply=true weight=1
      IKMarkerTask R.Heel: apply=true weight=1
      IKMarkerTask R.Toe.Lat: apply=true weight=1
      IKMarkerTask R.Toe.Tip: apply=true weight=1
      IKMarkerTask L.Knee.Lat: apply=true weight=1
      IKMarkerTask L.Knee.Med: apply=true weight=1
      IKMarkerTask L.Ankle.Lat: apply=true weight=1
      IKMarkerTask L.Ankle.Med: apply=true weight=1
      IKMarkerTask L.Heel: apply=true weight=1
      IKMarkerTask L.Toe.Lat: apply=true weight=1
      IKMarkerTask L.Toe.Tip: apply=true weight=1
      IKCoordinateTask [values shared by the 23 below unless stated]: weight=1 value_type=default_value value=0
      IKCoordinateTask pelvis_tilt: apply=true
      IKCoordinateTask pelvis_list: apply=true
      IKCoordinateTask pelvis_ty: apply=false
      IKCoordinateTask pelvis_tz: apply=false
      IKCoordinateTask hip_flexion_r: apply=false
      IKCoordinateTask hip_adduction_r: apply=false
      IKCoordinateTask hip_rotation_r: apply=true
      IKCoordinateTask knee_angle_r: apply=true
      IKCoordinateTask knee_angle_r_ie: apply=false
      IKCoordinateTask knee_angle_r_vv: apply=false
      IKCoordinateTask ankle_angle_r: apply=false
      IKCoordinateTask subtalar_angle_r: apply=true
      IKCoordinateTask mtp_angle_r: apply=true
      IKCoordinateTask hip_flexion_l: apply=false
      IKCoordinateTask hip_adduction_l: apply=false
      IKCoordinateTask hip_rotation_l: apply=true
      IKCoordinateTask knee_angle_l: apply=true
      IKCoordinateTask knee_angle_l_ie: apply=false
      IKCoordinateTask knee_angle_l_vv: apply=false
      IKCoordinateTask ankle_angle_l: apply=false
      IKCoordinateTask subtalar_angle_l: apply=true
      IKCoordinateTask mtp_angle_l: apply=true
      IKCoordinateTask lumbar_extension: apply=false
